H(Q) := 5*(66.9 + 4.01*10^-2*Q - 2.21*10^-4*Q^2)
Q := 0, 50 .. 400
H(Q) = [334.5; 341.763; 343.5; 339.713; 330.4; 315.563; 295.2; 269.312; 237.9]
Qmin := 228
hr(Q) := 250 + 0.0002*Q^2
hr'(Q) := 250 + (0.0002/4)*Q^2
Qr := 342
k := 1 .. 1.027
nr(Q) := sqrt(15.08*Q)
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